*Heading
** Job name: er Model name: BallDrop
** Generated by: Abaqus/CAE 2018
*Preprint, echo=NO, model=NO, history=NO, contact=NO
**
** PARTS
**
*Part, name=ELASTOLLAN
*Node
      1,         10.5,         -0.5
      2,         10.5,          2.5
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*Element, type=CAX4R
  1,   1,   7, 196,  92
  2,   7,   8, 197, 196
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*Nset, nset=_PICKEDSET5, internal, generate
   1,  924,    1
*Elset, elset=_PICKEDSET5, internal, generate
   1,  830,    1
** Section: Section-1-_PICKEDSET5
*Solid Section, elset=_PICKEDSET5, material="Elastollan C 95 A"
,
*End Part
**
*Part, name=RIGIDBODY-1
*End Part
**
**
** ASSEMBLY
**
*Assembly, name=Assembly
**
*Instance, name=ELASTOLLAN-1, part=ELASTOLLAN
          0.,        -12.5,           0.
*End Instance
**
*Instance, name=RIGIDBODY-1, part=RIGIDBODY-1
          0.,         -10.,           0.
*Node
      1,           0.,          10.
*Nset, nset=RIGIDBODY-1-RefPt_, internal
 1,
*Nset, nset=RIGIDBODY-1-REFPT_, internal
 1,
*Nset, nset=_PICKEDSET3, internal
 1,
*Nset, nset=_M4, internal
 1,
*Surface, type=SEGMENTS, name=RIGIDBODY-1-RIGIDSURFACE_, internal
START,           8.,           4.
 CIRCL,           0.,           0.,           0.,          10.
*Element, type=MASS, elset=_M4_Interia-1_MASS__
1, 1
*Mass, elset=_M4_Interia-1_MASS__
3.262e-05,
*End Instance
**
*Nset, nset=RP, instance=RIGIDBODY-1
 1,
*Nset, nset=_PICKEDSET71, internal, instance=ELASTOLLAN-1
   1,   4,   5,  59,  60,  61
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*Elset, elset=_PICKEDSET71, internal, instance=ELASTOLLAN-1
   1,  11,  21,  31,  41,  51
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*Nset, nset=_PICKEDSET74, internal, instance=RIGIDBODY-1
 1,
*Nset, nset=_PICKEDSET75, internal, instance=RIGIDBODY-1
 1,
*Nset, nset=_PICKEDSET77, internal, instance=RIGIDBODY-1
 1,
*Elset, elset=__PICKEDSURF76_S2, internal, instance=ELASTOLLAN-1, generate
  10,  350,   10
*Surface, type=ELEMENT, name=_PICKEDSURF76, internal
__PICKEDSURF76_S2, S2
** Constraint: RigidBody-1
*Rigid Body, ref node=RIGIDBODY-1.RIGIDBODY-1-REFPT_, analytical surface=RIGIDBODY-1.RIGIDBODY-1-RIGIDSURFACE_
*End Assembly
**
** MATERIALS
**
*Material, name="Elastollan C 95 A"
*Density
 1.62e-09,
*Hyperelastic, neo hooke, test data input, moduli=INSTANTANEOUS
*Uniaxial Test Data, smooth=3
      0., 0.000667
  0.0616, 0.000872
  0.0641, 0.000898
  0.4226, 0.004731
  0.6251, 0.006807
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 10.1698, 0.497501
*Viscoelastic, time=PRONY
0.26, 0.26, 1.00E-04
0.26, 0.26, 1.00E-03
 0.18,   0.18,   0.01
*Material, name=STEEL
*Density
 8.7e-07,
*Elastic
 2.1e+08, 0.3
**
** INTERACTION PROPERTIES
**
*Surface Interaction, name=INTPROP-1
*Surface Behavior, pressure-overclosure=HARD
**
** BOUNDARY CONDITIONS
**
** Name: Disp-BC-1 Type: Displacement/Rotation
*Boundary
_PICKEDSET74, 1, 1
** Name: Disp-BC-2 Type: Displacement/Rotation
*Boundary
_PICKEDSET74, 6, 6
**
** PREDEFINED FIELDS
**
** Name: IC-1   Type: Velocity
*Initial Conditions, type=VELOCITY
_PICKEDSET77, 2, -3350.
** ----------------------------------------------------------------
**
** STEP: Step-1
**
*Step, name=Step-1, nlgeom=YES
*Dynamic, Explicit
, 1.0
*Bulk Viscosity
0.06, 1.2
**
** BOUNDARY CONDITIONS
**
** Name: Disp-BC-3 Type: Displacement/Rotation
*Boundary
_PICKEDSET71, 1, 1
** Name: Disp-BC-4 Type: Displacement/Rotation
*Boundary
_PICKEDSET71, 2, 2
**
** LOADS
**
** Name: CFORCE-1   Type: Concentrated force
*Cload
_PICKEDSET75, 2, -0.316112
**
** INTERACTIONS
**
** Interaction: INT-1-1
*Contact Pair, interaction=INTPROP-1, mechanical constraint=KINEMATIC, cpset=INT-1-1
RIGIDBODY-1.RIGIDBODY-1-RIGIDSURFACE_, _PICKEDSURF76
**
** OUTPUT REQUESTS
**
*Restart, write, number interval=1, time marks=NO
**
** FIELD OUTPUT: F-Output-1
**
*Output, field, time interval=0.005
*Node Output
COORD, UT, VT
**
** HISTORY OUTPUT: H-Output-1
**
*Output, history, variable=PRESELECT
*End Step
